<?xml version="1.0"?>
<!--
  File:     rotax912is.xml
  Author:   Aleksey Matyushev

  Inputs:
    name:           Rotax 912is
    type:           piston
    power:          100.0 hp
    augmented?      no
    injected?       no
-->

<piston_engine name="rotax912is">
  <minmp unit="INHG">         6.5  </minmp>	<!-- Deprecated -->
  <maxmp unit="INHG">        28.5  </maxmp>	<!-- needs to be updated -->
  <displacement unit="IN3"> 320.0  </displacement> <!-- needs to be updated -->
  <maxhp>                   100.0    </maxhp>
  <bsfc>                      0.37 </bsfc> <!-- needs to be updated -->
  <cycles>                    4.0  </cycles>
  <idlerpm>                3000.0  </idlerpm>
  <maxrpm>                 5800.0  </maxrpm>
  <maxthrottle>               1.0  </maxthrottle>
  <minthrottle>               0.1  </minthrottle>
  <sparkfaildrop>             0.1 </sparkfaildrop>
</piston_engine>
